# OpenSim document version 40500
ForceSet gait2392_lumbar_candidate:
  Thelen2003Muscle [values shared by the 6 below unless stated]: optimal_force=1 pennation_angle_at_optimal=0
      max_contraction_velocity=10 FmaxTendonStrain=0.033 FmaxMuscleStrain=0.6 KshapeActive=0.5 KshapePassive=4 Af=0.3
      Flen=1.8 activation_time_constant=0.01 deactivation_time_constant=0.04
  Thelen2003Muscle gait2392_ercspn_r: max_isometric_force=2500 optimal_fiber_length=0.12 tendon_slack_length=0.03
    PathPoint ercspn_r-P1: pelvis (-0.1551377 0.0545303 0.0436)
    PathPoint ercspn_r-P2: torso (-0.055 0.11 0.0241)
  Thelen2003Muscle gait2392_intobl_r: max_isometric_force=900 optimal_fiber_length=0.1 tendon_slack_length=0.1
    PathPoint intobl_r-P1: pelvis (-0.05513772 0.0806303 0.1157)
    PathPoint intobl_r-P2: torso (0.07 0.16 0.015)
  Thelen2003Muscle gait2392_extobl_r: max_isometric_force=900 optimal_fiber_length=0.12 tendon_slack_length=0.14
    PathPoint extobl_r-P1: pelvis (-0.04513772 -0.0529697 0.01)
    PathPoint extobl_r-P2: torso (0.065 0.11 0.11)
  Thelen2003Muscle gait2392_ercspn_l: max_isometric_force=2500 optimal_fiber_length=0.12 tendon_slack_length=0.03
    PathPoint ercspn_l-P1: pelvis (-0.1551377 0.0545303 -0.0436)
    PathPoint ercspn_l-P2: torso (-0.055 0.11 -0.0241)
  Thelen2003Muscle gait2392_intobl_l: max_isometric_force=900 optimal_fiber_length=0.1 tendon_slack_length=0.1
    PathPoint intobl_l-P1: pelvis (-0.05513772 0.0806303 -0.1157)
    PathPoint intobl_l-P2: torso (0.07 0.16 -0.015)
  Thelen2003Muscle gait2392_extobl_l: max_isometric_force=900 optimal_fiber_length=0.12 tendon_slack_length=0.14
    PathPoint extobl_l-P1: pelvis (-0.04513772 -0.0529697 -0.01)
    PathPoint extobl_l-P2: torso (0.065 0.11 -0.11)
