# OpenSim document version 40000
ForceSet unregistered_source_shoulder_complement:
  Millard2012EquilibriumMuscle [values shared by the 15 below unless stated]: max_contraction_velocity=10
      default_activation=1 minimum_activation=0
    ActiveForceLengthCurve: min_norm_active_fiber_length=0.4327 transition_norm_fiber_length=0.728
        max_norm_active_fiber_length=1.595 shallow_ascending_slope=0.4613 minimum_value=0
    ForceVelocityCurve: concentric_slope_at_vmax=0 concentric_slope_near_vmax=0.25 isometric_slope=5
        eccentric_slope_at_vmax=0 eccentric_slope_near_vmax=0.15 max_eccentric_velocity_force_multiplier=1.4
    FiberForceLengthCurve: strain_at_zero_force=0 strain_at_one_norm_force=0.6405 stiffness_at_low_force=0.0751
        stiffness_at_one_norm_force=6.3163 curviness=0.6658
    TendonForceLengthCurve: strain_at_one_norm_force=0.033 stiffness_at_one_norm_force=37.393
        norm_force_at_toe_end=0.2255 curviness=0.4504
  Millard2012EquilibriumMuscle DELT1: max_isometric_force=1218.9 optimal_fiber_length=0.0976 tendon_slack_length=0.093
      pennation_angle_at_optimal=0.3839724
    PathPoint P1: humerus (0.00896 -0.11883 0.00585)
    PathPoint P2: humerus (0.01623 -0.11033 0.00412)
    PathPoint P3: scapula (0.04347 -0.03202 0.00499)
    PathPoint P4: clavicle (-0.014 0.01106 0.08021)
    PathWrap: wrap_object=delt2hum method=hybrid
    PathWrap pathwrap_0: wrap_object=DELT1hh method=hybrid range=(2 3)
  Millard2012EquilibriumMuscle DELT2: max_isometric_force=1103.5 optimal_fiber_length=0.1078 tendon_slack_length=0.1095
      pennation_angle_at_optimal=0.2617994
    PathPoint P1: humerus (0.00461 -0.13611 0.0056)
    MovingPathPoint default: humerus socket_x_coordinate=/jointset/shoulder2/shoulder_rot
        socket_y_coordinate=/jointset/shoulder2/shoulder_rot socket_z_coordinate=/jointset/shoulder2/shoulder_rot
        x_location=PiecewiseLinearFunction(x=-1.5708 0.349066, y=0.03804 0)
      y_location: PiecewiseLinearFunction: x=(-1.5708 0.349066) y=(-0.0619 -0.06012)
      z_location: SimmSpline: x=(-1.5708 -0.851248 0.349066) y=(0.00208 0.0203027 0.02532)
    PathPoint P3: scapula (5e-5 0.00294 0.02233)
    PathPoint P4: scapula (-0.01078 -0.00034 0.0062)
    PathWrap: wrap_object=Deltoid2 method=hybrid
    PathWrap pathwrap_0: wrap_object=delt2hum method=hybrid
    PathWrap pathwrap_1: wrap_object=DELT_TMAJ_LAT_PEC_CORBhh method=hybrid
  Millard2012EquilibriumMuscle DELT3: max_isometric_force=201.6 optimal_fiber_length=0.1367 tendon_slack_length=0.038
      pennation_angle_at_optimal=0.3141593
    PathPoint P1: scapula (-0.05573 0.00122 -0.02512)
    PathPoint P2: scapula (-0.07247 -0.03285 0.01233)
    PathPoint P3: humerus (0.00206 -0.07602 0.01045)
    PathWrap: wrap_object=Delt3 method=hybrid range=(1 2)
    PathWrap pathwrap_0: wrap_object=delt3hum method=hybrid
    PathWrap pathwrap_1: wrap_object=DELT_TMAJ_LAT_PEC_CORBhh method=hybrid
  Millard2012EquilibriumMuscle SUPSP: max_isometric_force=499.2 optimal_fiber_length=0.0682 tendon_slack_length=0.0395
      pennation_angle_at_optimal=0.1221731
    PathPoint P1: humerus (0.00256 0.01063 0.02593)
    PathPoint P2: scapula (-0.01918 0.00127 -0.01271)
    PathPoint P3: scapula (-0.044 -0.01512 -0.05855)
    PathWrap: wrap_object=SUPSP method=hybrid
  Millard2012EquilibriumMuscle INFSP: max_isometric_force=1075.8 optimal_fiber_length=0.0755 tendon_slack_length=0.0308
      pennation_angle_at_optimal=0.3316126
    PathPoint P1: humerus (-0.00887 0.00484 0.02448)
    PathPoint P2: scapula (-0.07382 -0.05476 -0.04781)
    PathWrap: wrap_object=INFSP method=hybrid
    PathWrap pathwrap_0: wrap_object=infsp_new method=hybrid
  Millard2012EquilibriumMuscle SUBSC: max_isometric_force=1306.9 optimal_fiber_length=0.0873 tendon_slack_length=0.033
      pennation_angle_at_optimal=0.3490659
    PathPoint P1: humerus (0.01403 0.0084 -0.01331)
    PathPoint P2: scapula (-0.01831 -0.05223 -0.02457)
    PathPoint P3: scapula (-0.07246 -0.03943 -0.06475)
    PathWrap: wrap_object=SUBSCAP method=hybrid
  Millard2012EquilibriumMuscle TMIN: max_isometric_force=269.5 optimal_fiber_length=0.0741 tendon_slack_length=0.0713
      pennation_angle_at_optimal=0.418879
    PathPoint P1: humerus (-0.00127 -0.01259 0.022)
    PathPoint P2: scapula (-0.09473 -0.07991 -0.04737)
    PathPoint P3: scapula (-0.09643 -0.08121 -0.05298)
    PathWrap: wrap_object=TMIN method=hybrid range=(1 2)
    PathWrap pathwrap_0: wrap_object=INFSP_and_TMIN_hum_head method=hybrid range=(1 2)
    PathWrap pathwrap_1: wrap_object=TMINhum method=hybrid range=(1 2)
  Millard2012EquilibriumMuscle TMAJ: max_isometric_force=144 optimal_fiber_length=0.1624 tendon_slack_length=0.02
      pennation_angle_at_optimal=0.2792527
    PathPoint P1: humerus (0.00998 -0.05419 -0.00568)
    ConditionalPathPoint default: humerus (0.009 -0.054 -0.009) socket_coordinate=/jointset/shoulder2/shoulder_rot
        range=(0.261799 2.0944)
    ConditionalPathPoint default_0: humerus (0.009 -0.054 -0.009) socket_coordinate=/jointset/shoulder0/elv_angle
        range=(-1.65806 -0.174533)
    PathPoint P2: scapula (-0.10264 -0.10319 -0.05829)
    PathPoint P3: scapula (-0.10489 -0.10895 -0.07117)
    PathWrap: wrap_object=TMAJ_LAThum method=hybrid
    PathWrap pathwrap_0: wrap_object=LAT_TMAJhh method=hybrid range=(1 4)
    PathWrap pathwrap_1: wrap_object=LAT_TMAJ2hh method=hybrid
  Millard2012EquilibriumMuscle PECM1: max_isometric_force=444.3 optimal_fiber_length=0.1442 tendon_slack_length=0.0028
      pennation_angle_at_optimal=0.296706 ignore_tendon_compliance=true
    PathPoint P1: humerus (0.01169 -0.04191 0.0078)
    MovingPathPoint default: humerus socket_x_coordinate=/jointset/shoulder1/shoulder_elv
        socket_y_coordinate=/jointset/shoulder1/shoulder_elv socket_z_coordinate=/jointset/shoulder1/shoulder_elv
        x_location=PiecewiseLinearFunction(x=0 3.14159, y=0.01615 0.02205)
        y_location=PiecewiseLinearFunction(x=0 3.14159, y=-0.04045 -0.01975)
        z_location=PiecewiseLinearFunction(x=0 3.14159, y=-0.00577 0.00863)
    MovingPathPoint default_0: thorax socket_x_coordinate=/jointset/shoulder1/shoulder_elv
        socket_y_coordinate=/jointset/shoulder1/shoulder_elv socket_z_coordinate=/jointset/shoulder1/shoulder_elv
        x_location=PiecewiseLinearFunction(x=0 3.14159, y=0.00958 -0.00972)
        y_location=PiecewiseLinearFunction(x=0 3.14159, y=-0.01509 0.03151)
        z_location=PiecewiseLinearFunction(x=0 3.14159, y=0.12664 0.08244)
    PathPoint P2: clavicle (0.00321 -0.00013 0.05113)
    PathWrap: wrap_object=Thorax method=hybrid
    PathWrap pathwrap_0: wrap_object=PEC12hum method=hybrid range=(2 3)
    PathWrap pathwrap_1: wrap_object=PEC1hh method=hybrid
  Millard2012EquilibriumMuscle PECM2: max_isometric_force=658.3 optimal_fiber_length=0.1385 tendon_slack_length=0.089
      pennation_angle_at_optimal=0.4537856
    PathPoint P1: humerus (0.01274 -0.04289 0.00785)
    MovingPathPoint default: humerus socket_x_coordinate=/jointset/shoulder1/shoulder_elv
        socket_y_coordinate=/jointset/shoulder1/shoulder_elv socket_z_coordinate=/jointset/shoulder1/shoulder_elv
        x_location=PiecewiseLinearFunction(x=0 3.14159, y=0.01453 0.02043)
        y_location=PiecewiseLinearFunction(x=0 3.14159, y=-0.04568 -0.02498)
        z_location=PiecewiseLinearFunction(x=0 3.14159, y=-0.00687 0.00753)
    MovingPathPoint default_0: thorax socket_x_coordinate=/jointset/shoulder1/shoulder_elv
        socket_y_coordinate=/jointset/shoulder1/shoulder_elv socket_z_coordinate=/jointset/shoulder1/shoulder_elv
        x_location=PiecewiseLinearFunction(x=0 3.14159, y=0.02018 0.02148)
        y_location=PiecewiseLinearFunction(x=0 3.14159, y=-0.04165 0.00155)
        z_location=PiecewiseLinearFunction(x=0 3.14159, y=0.1269 0.1042)
    PathPoint P4: thorax (0.03091 -0.03922 0.09705)
    PathPoint P5: thorax (0.02769 -0.04498 0.02271)
    PathWrap: wrap_object=Thorax method=hybrid
    PathWrap pathwrap_0: wrap_object=PEC12hum method=hybrid range=(2 3)
    PathWrap pathwrap_1: wrap_object=TMAJ_LAT_PEC_CORBhh method=hybrid
    PathWrap pathwrap_2: wrap_object=PEC23hh method=hybrid
  Millard2012EquilibriumMuscle PECM3: max_isometric_force=498.1 optimal_fiber_length=0.1385 tendon_slack_length=0.132
      pennation_angle_at_optimal=0.4363323
    PathPoint P1: humerus (0.01269 -0.04375 0.0075)
    MovingPathPoint default: humerus socket_x_coordinate=/jointset/shoulder1/shoulder_elv
        socket_y_coordinate=/jointset/shoulder1/shoulder_elv socket_z_coordinate=/jointset/shoulder1/shoulder_elv
        y_location=PiecewiseLinearFunction(x=0 3.13149, y=-0.05157 -0.040096)
      x_location: SimmSpline: x=(0 0.747517 3.14159) y=(0.01243 0.014912 0.01833)
      z_location: SimmSpline: x=(0 0.623056 2.29124 3.12533) y=(-0.01807 -0.008102 0.000123 -0.000324)
    MovingPathPoint default_0: thorax socket_x_coordinate=/jointset/shoulder1/shoulder_elv
        socket_y_coordinate=/jointset/shoulder1/shoulder_elv socket_z_coordinate=/jointset/shoulder1/shoulder_elv
        x_location=PiecewiseLinearFunction(x=0 3.14159, y=0.02984 0.02984)
        z_location=PiecewiseLinearFunction(x=0 3.14159, y=0.1151 0.1151)
      y_location: SimmSpline: x=(0.0101016 1.59605 3.14159) y=(-0.070778 -0.059781 -0.0269)
    PathPoint P4: thorax (0.0525 -0.08417 0.08935)
    PathPoint P5: thorax (0.05724 -0.11654 0.03787)
    PathWrap: wrap_object=Thorax method=hybrid
    PathWrap pathwrap_0: wrap_object=PEC3hum method=hybrid range=(2 3)
    PathWrap pathwrap_1: wrap_object=PEC23hh method=hybrid
  Millard2012EquilibriumMuscle LAT1: max_isometric_force=290.5 optimal_fiber_length=0.254 tendon_slack_length=0.12
      pennation_angle_at_optimal=0.4363323
    PathPoint P1: humerus (0.0105 -0.03415 -0.00653)
    ConditionalPathPoint default: humerus (0.01 -0.035 -0.00889323) socket_coordinate=/jointset/shoulder2/shoulder_rot
        range=(0.523599 2.0944)
    ConditionalPathPoint default_0: humerus (0.01 -0.035 -0.009) socket_coordinate=/jointset/shoulder0/elv_angle
        range=(-1.65806 -0.174533)
    MovingPathPoint default_1: scapula socket_x_coordinate=/jointset/shoulder1/shoulder_elv
        socket_y_coordinate=/jointset/shoulder1/shoulder_elv socket_z_coordinate=/jointset/shoulder1/shoulder_elv
        x_location=PiecewiseLinearFunction(x=0 3.14159, y=-0.07947 -0.08157)
        y_location=PiecewiseLinearFunction(x=0 3.14159, y=-0.08581 -0.05061)
        z_location=PiecewiseLinearFunction(x=0 3.14159, y=-0.02188 -0.03628)
    MovingPathPoint default_2: scapula socket_x_coordinate=/jointset/shoulder1/shoulder_elv
        socket_y_coordinate=/jointset/shoulder1/shoulder_elv socket_z_coordinate=/jointset/shoulder1/shoulder_elv
        x_location=PiecewiseLinearFunction(x=0 3.14159, y=-0.11215 -0.10635)
        y_location=PiecewiseLinearFunction(x=0 3.14159, y=-0.09779 -0.04699)
        z_location=PiecewiseLinearFunction(x=0 3.14159, y=-0.05322 -0.09522)
    PathPoint P4: thorax (-0.11828 -0.10118 0.03316)
    PathPoint P5: thorax (-0.09578 -0.11724 0.00882)
    PathWrap: wrap_object=TMAJ_LAThum method=hybrid
    PathWrap pathwrap_0: wrap_object=LAT_TMAJhh method=hybrid range=(1 4)
    PathWrap pathwrap_1: wrap_object=LAT_TMAJ2hh method=hybrid
  Millard2012EquilibriumMuscle LAT2: max_isometric_force=317.5 optimal_fiber_length=0.2324 tendon_slack_length=0.1765
      pennation_angle_at_optimal=0.3316126
    PathPoint P1: humerus (0.00968 -0.04071 -0.00611)
    ConditionalPathPoint default: humerus (0.008 -0.043 -0.01) socket_coordinate=/jointset/shoulder2/shoulder_rot
        range=(0.349066 2.0944)
    ConditionalPathPoint default_0: humerus (0.00799949 -0.0433861 -0.0100971)
        socket_coordinate=/jointset/shoulder0/elv_angle range=(-1.65806 -0.174533)
    MovingPathPoint default_1: scapula socket_x_coordinate=/jointset/shoulder1/shoulder_elv
        socket_y_coordinate=/jointset/shoulder1/shoulder_elv socket_z_coordinate=/jointset/shoulder1/shoulder_elv
        x_location=PiecewiseLinearFunction(x=0 3.14159, y=-0.0764 -0.0905)
        y_location=PiecewiseLinearFunction(x=0 3.14159, y=-0.1022 -0.0717)
        z_location=PiecewiseLinearFunction(x=0 3.14159, y=-0.01808 -0.03098)
    MovingPathPoint default_2: scapula socket_x_coordinate=/jointset/shoulder1/shoulder_elv
        socket_y_coordinate=/jointset/shoulder1/shoulder_elv socket_z_coordinate=/jointset/shoulder1/shoulder_elv
        x_location=PiecewiseLinearFunction(x=0 3.14159, y=-0.10054 -0.12994)
        y_location=PiecewiseLinearFunction(x=0 3.14159, y=-0.13969 -0.07529)
        z_location=PiecewiseLinearFunction(x=0 3.14159, y=-0.05258 -0.12468)
    PathPoint P4: thorax (-0.10992 -0.16908 0.02878)
    PathPoint P5: thorax (-0.07186 -0.18818 0.00815)
    PathWrap: wrap_object=TMAJ_LAThum method=hybrid
    PathWrap pathwrap_0: wrap_object=LAT_TMAJhh method=hybrid range=(1 4)
    PathWrap pathwrap_1: wrap_object=LAT_TMAJ2hh method=hybrid
  Millard2012EquilibriumMuscle LAT3: max_isometric_force=189 optimal_fiber_length=0.2789 tendon_slack_length=0.1403
      pennation_angle_at_optimal=0.3665191
    PathPoint P1: humerus (0.01208 -0.03922 -0.00416)
    ConditionalPathPoint default: humerus (0.01 -0.041 -0.009) socket_coordinate=/jointset/shoulder2/shoulder_rot
        range=(0.174533 2.0944)
    ConditionalPathPoint default_0: humerus (0.01 -0.041 -0.009) socket_coordinate=/jointset/shoulder0/elv_angle
        range=(-1.65806 -0.0872665)
    MovingPathPoint default_1: scapula socket_x_coordinate=/jointset/shoulder1/shoulder_elv
        socket_y_coordinate=/jointset/shoulder1/shoulder_elv socket_z_coordinate=/jointset/shoulder1/shoulder_elv
        x_location=PiecewiseLinearFunction(x=0 3.14159, y=-0.05678 -0.11198)
        y_location=PiecewiseLinearFunction(x=0 3.14159, y=-0.13303 -0.09893)
        z_location=PiecewiseLinearFunction(x=0 3.14159, y=-0.0213 -0.0386)
    MovingPathPoint default_2: scapula socket_x_coordinate=/jointset/shoulder1/shoulder_elv
        socket_y_coordinate=/jointset/shoulder1/shoulder_elv socket_z_coordinate=/jointset/shoulder1/shoulder_elv
        x_location=PiecewiseLinearFunction(x=0 3.14159, y=-0.09449 -0.13109)
        y_location=PiecewiseLinearFunction(x=0 3.14159, y=-0.17553 -0.10113)
        z_location=PiecewiseLinearFunction(x=0 3.14159, y=-0.04406 -0.13416)
    PathPoint P4: thorax (-0.11157 -0.19387 0.05532)
    PathPoint P5: thorax (-0.07117 -0.24858 0.00907)
    PathWrap: wrap_object=TMAJ_LAThum method=hybrid
    PathWrap pathwrap_0: wrap_object=LAT_TMAJhh method=hybrid range=(1 4)
    PathWrap pathwrap_1: wrap_object=LAT_TMAJ2hh method=hybrid
  Millard2012EquilibriumMuscle CORB: max_isometric_force=208.2 optimal_fiber_length=0.0932 tendon_slack_length=0.097
      pennation_angle_at_optimal=0.4712389
    PathPoint P1: scapula (0.0125 -0.04127 -0.02652)
    PathPoint P2: scapula (0.00483 -0.06958 -0.01563)
    PathPoint P3: humerus (0.00743 -0.15048 -0.00782)
    PathWrap: wrap_object=CORBhum method=hybrid
    PathWrap pathwrap_0: wrap_object=TMAJ_LAT_PEC_CORBhh method=hybrid
